# OpenSim document version 40000
Model MoBL_Flexion_SpasticMillard-scaled_Version2:
  gravity: 0 -9.80665 0
  publications: Comp Meth Biomech Biomed Eng 2014
  length_units: meters
  force_units: N
  credits:
    Katherine R. Saul, Wendy M. Murray, Craig M. Goehler, Melissa Daly, Meghan E. Vidt, Dustin L. Crouch
  defaults:
    Millard2012EquilibriumMuscle default: min_control=0.01 optimal_force=1 max_isometric_force=546
        optimal_fiber_length=0.0535 tendon_slack_length=0.078 pennation_angle_at_optimal=0.1396263 [radians]
        max_contraction_velocity=10 activation_time_constant=0.015 [seconds] deactivation_time_constant=0.05 [seconds]
    ActiveForceLengthCurve default: min_norm_active_fiber_length=0.4441 transition_norm_fiber_length=0.73
        max_norm_active_fiber_length=1.8123 shallow_ascending_slope=0.8616 minimum_value=0.1
    ForceVelocityCurve default: concentric_slope_at_vmax=0 concentric_slope_near_vmax=0.25 isometric_slope=5
        eccentric_slope_at_vmax=0 eccentric_slope_near_vmax=0.15 max_eccentric_velocity_force_multiplier=1.4
    FiberForceLengthCurve default: strain_at_zero_force=0 strain_at_one_norm_force=0.7 stiffness_at_low_force=0.2
        stiffness_at_one_norm_force=2.86 curviness=0.75
    TendonForceLengthCurve default: strain_at_one_norm_force=0.049 stiffness_at_one_norm_force=28.06122
        norm_force_at_toe_end=0.6667 curviness=0.5
  Ground
  BodySet:
    Body thorax: mass=32.0712 [kg] mass_center=(0 0 0) inertia=(1 1 1 0 0 0) meshes=thorax.vtp
      WrapEllipsoid Thorax: xyz_body_rotation=(0.0434587 -0.331962 0.189892) translation=(-0.0386 -0.1273 0.0709)
          quadrant=all dimensions=(0.1 0.135 0.08)
    Body clavicle: mass=0.156 mass_center=(-0.011096 0.0063723 0.054168)
        inertia=(0.00024259 0.00025526 4.442e-5 -1.898e-5 -6.994e-5 5.371e-5) meshes=clavicle.vtp
    Body clavphant: mass=0.0001 mass_center=(0 0 0) inertia=(1 1 1 0 0 0)
    Body scapula: mass=0.70396 mass_center=(-0.054694 -0.035032 -0.043734)
        inertia=(0.0012429 0.0011504 0.0013651 0.0004494 0.00040922 0.0002411) meshes=scapula.vtp
      WrapEllipsoid Deltoid2: xyz_body_rotation=(3.13042 -1.54881 -1.31423) translation=(-0.0058 -0.0378 0.0096)
          quadrant=-y dimensions=(0.033 0.04 0.035)
      WrapTorus Delt3: xyz_body_rotation=(0.620988 0.32882 -0.560774) translation=(-0.0973 -0.0428 -0.037) quadrant=all
          inner_radius=0.04 outer_radius=0.06
      WrapTorus INFSP: xyz_body_rotation=(0.0253073 0.58835 0.151844) translation=(-0.0561 -0.0199 -0.0112)
          quadrant=all inner_radius=0.008 outer_radius=0.019
      WrapEllipsoid TMIN: xyz_body_rotation=(-2.09754 -0.280823 -1.76348) translation=(-0.0418 -0.0519 -0.0359)
          quadrant=x dimensions=(0.03 0.03 0.05)
      WrapCylinder TRIlongglen: xyz_body_rotation=(1.37532 -0.294612 2.43596) translation=(-0.0359 -0.0309 -0.0132)
          quadrant=x radius=0.003 length=0.03
    Body scapphant: mass=0.0001 mass_center=(0 0 0) inertia=(1 1 1 0 0 0)
    Body humphant: mass=0.0001 mass_center=(0 0 0) inertia=(1 1 1 0 0 0)
    Body humphant1: mass=0.0001 mass_center=(0 0 0) inertia=(1 1 1 0 0 0)
    Body humerus: mass=1.99757 mass_center=(0.018064 -0.140141 -0.012746)
        inertia=(0.0122776 0.00255133 0.0125789 -0.00034741 -0.0002325 0.0012293) meshes=humerus.vtp
      WrapEllipsoid DELT1hh: xyz_body_rotation=(0.0584685 1.00461 0.570374) translation=(-0.0139 -0.0127 -0.0262)
          quadrant=z dimensions=(0.03 0.1 0.05)
      WrapCylinder delt2hum: xyz_body_rotation=(1.55093 -0.0199582 0.0596618) translation=(0.0017 -0.0958 0.0011)
          quadrant=all radius=0.0109 length=0.12
      WrapEllipsoid delt3hum: xyz_body_rotation=(1.72735 0.0759218 -2.74313) translation=(0.0019 -0.0592 0.0011)
          quadrant=x dimensions=(0.01 0.01 0.05)
      WrapEllipsoid SUPSP: xyz_body_rotation=(0.0380482 0.00855211 -1.30673) translation=(0.0002 0.0077 0.0043)
          quadrant=all dimensions=(0.02 0.02 0.02)
      WrapEllipsoid INFSP_and_TMIN_hum_head: xyz_body_rotation=(-0.286583 -0.00907571 -0.0684169)
          translation=(-0.0003 0.0026 0.0038) quadrant=all dimensions=(0.02 0.025 0.02)
      WrapEllipsoid SUBSCAP: xyz_body_rotation=(-0.924501 0.288852 0.381529) translation=(-0.0025 0.0007 -0.0045)
          quadrant=all dimensions=(0.02 0.017 0.028)
      WrapCylinder TMINhum: xyz_body_rotation=(1.75353 0.0692896 2.74628) translation=(-0.0014 -0.0455 0) quadrant=x
          radius=0.007 length=0.07
      WrapCylinder TMAJ_LAThum: xyz_body_rotation=(1.53641 -0.0637045 1.41424) translation=(0.0007 -0.0443 -0.0055)
          quadrant=-x radius=0.007 length=0.04
      WrapCylinder PEC12hum: xyz_body_rotation=(1.55928 -0.0774926 -0.925897) translation=(0.002 -0.0508 -0.0017)
          quadrant=x radius=0.009 length=0.07
      WrapSphere PEC23hh: translation=(-0.0086 0.0021 -0.0004) quadrant=all radius=0.02
      WrapEllipsoid PEC1hh: xyz_body_rotation=(-0.620465 -0.310494 0.363727) translation=(-0.0037 0.0005 -0.0025)
          quadrant=-z dimensions=(0.03 0.02 0.02)
      WrapCylinder PEC3hum: xyz_body_rotation=(1.44094 -0.0561996 1.75196) translation=(0.0009 -0.0551 -0.0004)
          quadrant=-x radius=0.008 length=0.1
      WrapCylinder LAT_TMAJhh: xyz_body_rotation=(-0.305084 -0.018326 -0.686613) translation=(-0.0224 0.0102 0.0094)
          quadrant=-y radius=0.007 length=0.045
      WrapSphere LAT_TMAJ2hh: xyz_body_rotation=(-0.127235 0.276111 0.0197222) translation=(-0.0016 0.0092 0.0052)
          quadrant=-z radius=0.03
      WrapEllipsoid Elbow_BIC_BRD: xyz_body_rotation=(-0.128631 0.137532 0.0307178) translation=(0.0019 -0.289 -0.014)
          quadrant=x dimensions=(0.015 0.015 0.1)
      WrapEllipsoid TRIlonghh: xyz_body_rotation=(3.00162 -0.853466 2.57419) translation=(-0.0078 -0.0041 -0.0014)
          quadrant=z dimensions=(0.035 0.02 0.02)
      WrapCylinder TRI: xyz_body_rotation=(-0.14015 -0.00628319 0.154985) translation=(0.0028 -0.2919 -0.0119)
          quadrant=all radius=0.016 length=0.1
      WrapEllipsoid ANC: xyz_body_rotation=(0.00750492 -0.196699 1.04929) translation=(0.0134 -0.2861 -0.0008)
          quadrant=-x dimensions=(0.02 0.02 0.02)
      WrapEllipsoid BIClong: xyz_body_rotation=(-2.00434 -1.00164 0.975465) translation=(0.0033 0.0073 0.0003)
          quadrant=-y dimensions=(0.025 0.02 0.02)
      WrapSphere TMAJ_LAT_PEC_CORBhh: translation=(0.0007 0 0.006) quadrant=all radius=0.03
      WrapSphere DELT_TMAJ_LAT_PEC_CORBhh: translation=(0.0007 0 0.006) quadrant=all radius=0.03
      WrapCylinder CORBhum: xyz_body_rotation=(-1.60832 0.0959931 0.875283) translation=(0.0027 -0.1202 -0.0059)
          quadrant=x radius=0.008 length=0.1
      WrapEllipsoid Elbow_PT_ECRL: xyz_body_rotation=(-0.161094 -0.110828 0.61453) translation=(0.003 -0.2872 -0.0069)
          quadrant=x dimensions=(0.018 0.025 0.035)
    Body ulna: mass=1.1053 mass_center=(0.00971783 -0.0959509 0.024286)
        inertia=(0.00541309 0.00115318 0.00494361 0.00031686 -7.615e-5 0.00109169) meshes=ulna.vtp
      WrapCylinder PQ2: xyz_body_rotation=(1.39138 0.0689405 1.52245) translation=(-0.0012 -0.2092 0.0428) quadrant=all
          radius=0.007 length=0.1
    Body radius: mass=0.23359 mass_center=(0.0336341 -0.181559 0.0156)
        inertia=(0.00043855 8.859e-5 0.00040258 3.014e-5 -4.24e-6 6.418e-5) meshes=radius.vtp
      WrapCylinder SUP: xyz_body_rotation=(1.44775 0.304036 -2.44102) translation=(0.0045 -0.0437 0.0059) quadrant=-x
          radius=0.008 length=0.04
      WrapTorus ECU: xyz_body_rotation=(-0.986635 -0.148877 0.222704) translation=(-0.0163 -0.2417 0.0349) quadrant=all
          inner_radius=0.006 outer_radius=0.009
      WrapCylinder PQ1: xyz_body_rotation=(-1.60762 -0.0127409 -2.69025) translation=(0.0281 -0.1986 0.0288)
          quadrant=all radius=0.01 length=0.1
    Body proximal_row: mass=0.0001 mass_center=(0 0 0) inertia=(1e-5 1e-5 1e-5 0 0 0)
        meshes=(lunate.vtp sdfastSCAPHOIDw.vtp sdfastPISIFORMw.vtp sdfastTRIQUETRALw.vtp)
      WrapEllipsoid Extensor_ellipse: xyz_body_rotation=(-0.250804 0.285536 0.232827)
          translation=(0.0007 -0.0135 0.0047) quadrant=z dimensions=(0.05 0.02 0.013)
      WrapTorus ECRL: xyz_body_rotation=(1.53833 0.234398 0.731118) translation=(0.0222 -0.0096 0.0208) quadrant=all
          inner_radius=0.008 outer_radius=0.016
      WrapTorus ECRB: xyz_body_rotation=(1.31266 -0.11781 -0.116239) translation=(0.0126 -0.0095 0.0186) quadrant=all
          inner_radius=0.008 outer_radius=0.01
      WrapTorus FCR: xyz_body_rotation=(-1.55596 -0.15324 -0.100007) translation=(0.0032 -0.0045 -0.019) quadrant=all
          inner_radius=0.001 outer_radius=0.0025
      WrapTorus FCU: xyz_body_rotation=(-1.57376 -0.0797616 0.39235) translation=(-0.0123 -0.0124 -0.0171) quadrant=all
          inner_radius=0.0068 outer_radius=0.008
      WrapEllipsoid PL: xyz_body_rotation=(-0.0315905 0.0996583 0.0633554) translation=(0.0057 -0.018 -0.0041)
          quadrant=-z dimensions=(0.025 0.014 0.012)
      WrapEllipsoid FDS: xyz_body_rotation=(0.00837758 -0.0816814 -0.0171042) translation=(0.0012 -0.0057 -0.0003)
          quadrant=-z dimensions=(0.025 0.013 0.012)
      WrapEllipsoid FDP: xyz_body_rotation=(-1.46747 -0.194604 0.121824) translation=(-0.0022 -0.0069 0.0032)
          quadrant=y dimensions=(0.025 0.013 0.012)
      WrapTorus EDCL: xyz_body_rotation=(2.36318 0.193033 -0.26913) translation=(-0.0128 -0.0133 0.0148) quadrant=all
          inner_radius=0.008 outer_radius=0.012
      WrapTorus EDCR: xyz_body_rotation=(1.98392 0.100531 0.523075) translation=(-0.0098 -0.0137 0.0166) quadrant=all
          inner_radius=0.0105 outer_radius=0.011
      WrapTorus EDCM: xyz_body_rotation=(1.99317 0.19792 0.368264) translation=(-0.0007 -0.0117 0.0191) quadrant=all
          inner_radius=0.009 outer_radius=0.012
      WrapTorus EDCI: xyz_body_rotation=(1.69768 0.0897099 0.00767945) translation=(0.009 -0.0149 0.0211) quadrant=all
          inner_radius=0.009 outer_radius=0.012
      WrapEllipsoid EDM: xyz_body_rotation=(2.9627 0.159349 0.117984) translation=(-0.0167 -0.0022 0.0048) quadrant=-z
          dimensions=(0.018 0.014 0.008)
      WrapEllipsoid FPL: xyz_body_rotation=(-0.16633 -0.082205 -0.0659735) translation=(0.017 -0.025 -0.0033)
          quadrant=-z dimensions=(0.016 0.01 0.01)
    Body hand: mass=0.5819 mass_center=(-0.00301314 -0.0424993 -0.00112205)
        inertia=(0.00011 6e-5 0.00015 9e-7 -2e-7 1.2e-5)
        meshes=(sdfast_1seg_hand_fr_c_5mc.vtp sdfast_1seg_hand_fr_c_4mc.vtp sdfast_1seg_hand_fr_c_3mc.vtp sdfast_1seg_hand_fr_c_2mc.vtp sdfast_1seg_hand_fr_c_trapezium.vtp sdfast_1seg_hand_fr_c_trapezoid.vtp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)
      WrapCylinder _2rdmcp_FDS: xyz_body_rotation=(0.593936 1.50011 -2.16578) translation=(0.0182 -0.0659 0.0087)
          quadrant=y radius=0.013 length=0.01
      WrapCylinder _2rdmcp_FDP: xyz_body_rotation=(0.593936 1.50011 -2.23559) translation=(0.0182 -0.0659 0.0087)
          quadrant=y radius=0.0105 length=0.01
      WrapCylinder _2rdmcp_ext: xyz_body_rotation=(0.593936 1.50011 -1.99125) translation=(0.0182 -0.0659 0.0087)
          quadrant=-y radius=0.01 length=0.01
      WrapEllipsoid _2ndmcp: active=false xyz_body_rotation=(1.48667 -1.29661 2.43072)
          translation=(0.0206 -0.068 0.0044) quadrant=-x dimensions=(0.005 0.005 0.03)
      WrapCylinder _3rdmcp_FDS: xyz_body_rotation=(0.770388 1.32837 1.5708) translation=(0.0007 -0.0655 0.0092)
          quadrant=-x radius=0.013 length=0.01
      WrapCylinder _3rdmcp_FDP: xyz_body_rotation=(0.770388 1.32837 1.5708) translation=(0.0046 -0.0662 0.0099)
          quadrant=-x radius=0.0105 length=0.01
      WrapCylinder _3rdmcp_ext: xyz_body_rotation=(0.770388 1.32837 1.46608) translation=(0.0007 -0.0655 0.0092)
          quadrant=y radius=0.01 length=0.01
      WrapCylinder _4rdmcp_FDS: xyz_body_rotation=(0.858527 1.10165 -2.48535) translation=(-0.0139 -0.0642 0.0033)
          quadrant=y radius=0.013 length=0.01
      WrapCylinder _4rdmcp_FDP: xyz_body_rotation=(0.858527 1.10165 -2.48535) translation=(-0.0139 -0.0642 0.0033)
          quadrant=y radius=0.0105 length=0.01
      WrapCylinder _4rdmcp_ext: xyz_body_rotation=(0.858527 1.10165 -3.09621) translation=(-0.0139 -0.0642 0.0033)
          quadrant=x radius=0.01 length=0.01
      WrapCylinder _5rdmcp_FDS: xyz_body_rotation=(0.470541 0.975639 -2.12162) translation=(-0.0235 -0.0561 -0.0057)
          quadrant=y radius=0.013 length=0.012
      WrapCylinder _5rdmcp_FDP: xyz_body_rotation=(0.470541 0.975639 -2.34852) translation=(-0.0235 -0.0561 -0.0057)
          quadrant=y radius=0.0105 length=0.01
      WrapCylinder _5rdmcp_ext: xyz_body_rotation=(0.470541 0.975639 -1.68529) translation=(-0.0235 -0.0561 -0.0057)
          quadrant=-y radius=0.01 length=0.012
      WrapCylinder Secondpm_FDS: xyz_body_rotation=(-1.57813 1.24808 1.0259) translation=(0.0307 -0.0924 -0.0222)
          quadrant=y radius=0.0075 length=0.01
      WrapCylinder Secondpm_FDP: xyz_body_rotation=(-1.57813 1.24808 1.0259) translation=(0.0307 -0.0924 -0.0222)
          quadrant=y radius=0.008 length=0.01
      WrapCylinder Secondpm_ext: xyz_body_rotation=(-1.57813 1.24808 1.0259) translation=(0.0307 -0.0924 -0.0222)
          quadrant=-y radius=0.0055 length=0.012
      WrapCylinder Secondmd_flex: xyz_body_rotation=(-1.63171 1.34286 2.11639) translation=(0.0291 -0.0821 -0.045)
          quadrant=y radius=0.005 length=0.01
      WrapCylinder Secondmd_ext: xyz_body_rotation=(-1.63171 1.34286 2.11639) translation=(0.0291 -0.0821 -0.045)
          quadrant=-y radius=0.002 length=0.01
      WrapCylinder Secondpm: active=false xyz_body_rotation=(2.2513 -1.37008 1.18159)
          translation=(0.0306 -0.0911 -0.0223) quadrant=all radius=0.004 length=0.01
      WrapCylinder Secondmd: active=false xyz_body_rotation=(1.35525 -1.38387 -0.557109)
          translation=(0.0295 -0.0815 -0.0441) quadrant=x radius=0.003 length=0.01
      WrapCylinder MPthumb: xyz_body_rotation=(0.321315 0.11013 -0.834791) translation=(0.0402 -0.0405 -0.0271)
          quadrant=all radius=0.0085 length=0.02
      WrapCylinder IPthumb: xyz_body_rotation=(0.332136 -0.026529 -0.257611) translation=(0.0396 -0.0713 -0.0365)
          quadrant=-x radius=0.0045 length=0.01
      WrapCylinder Thirdpm_FDS: xyz_body_rotation=(-0.407883 1.45246 -0.145386) translation=(0.0122 -0.0934 -0.0238)
          quadrant=y radius=0.0075 length=0.01
      WrapCylinder Thirdpm_FDP: xyz_body_rotation=(-0.407883 1.45246 -0.145386) translation=(0.0122 -0.0934 -0.0238)
          quadrant=y radius=0.008 length=0.01
      WrapCylinder Thirdpm_ext: xyz_body_rotation=(-0.407883 1.45246 -0.145386) translation=(0.0122 -0.0934 -0.0238)
          quadrant=-y radius=0.0055 length=0.01
      WrapCylinder Thirdmd_flex: xyz_body_rotation=(0.714189 1.28282 -0.203331) translation=(0.019 -0.0814 -0.0494)
          quadrant=y radius=0.005 length=0.01
      WrapCylinder Thirdmd_ext: xyz_body_rotation=(0.714189 1.28282 -0.203331) translation=(0.019 -0.0814 -0.0494)
          quadrant=-y radius=0.002 length=0.01
      WrapCylinder Fourthpm_FDS: xyz_body_rotation=(0.696212 0.976861 -1.21876) translation=(-0.005 -0.0871 -0.0289)
          quadrant=y radius=0.0075 length=0.01
      WrapCylinder Fourthpm_FDP: xyz_body_rotation=(0.696212 0.976861 -1.21876) translation=(-0.005 -0.0871 -0.0289)
          quadrant=y radius=0.008 length=0.01
      WrapCylinder Fourthpm_ext: xyz_body_rotation=(0.696212 0.976861 -1.21876) translation=(-0.005 -0.0871 -0.0289)
          quadrant=-y radius=0.0055 length=0.01
      WrapCylinder Fourthmd_flex: xyz_body_rotation=(0.75311 0.925897 -0.167377) translation=(0.0094 -0.0778 -0.0469)
          quadrant=y radius=0.005 length=0.01
      WrapCylinder Fourthmd_ext: xyz_body_rotation=(0.75311 0.925897 -0.167377) translation=(0.0094 -0.0778 -0.0469)
          quadrant=-y radius=0.002 length=0.01
      WrapCylinder Fifthpm_FDS: xyz_body_rotation=(0.977035 0.825192 -1.51687) translation=(-0.0154 -0.0784 -0.0329)
          quadrant=y radius=0.0075 length=0.01
      WrapCylinder Fifthpm_FDP: xyz_body_rotation=(0.977035 0.825192 -1.79612) translation=(-0.0153 -0.0786 -0.0329)
          quadrant=y radius=0.008 length=0.01
      WrapCylinder Fifthpm_ext: xyz_body_rotation=(0.977035 0.825192 -1.08053) translation=(-0.0152 -0.0785 -0.0328)
          quadrant=-y radius=0.0055 length=0.01
      WrapCylinder Fifthmd_flex: xyz_body_rotation=(0.979304 0.65031 -0.620814) translation=(0.0007 -0.0741 -0.0457)
          quadrant=y radius=0.005 length=0.01
      WrapCylinder Fifthmd_ext: xyz_body_rotation=(0.979304 0.65031 -0.620814) translation=(0.007 -0.0741 -0.0457)
          quadrant=-y radius=0.002 length=0.01
  JointSet:
    CustomJoint groundthorax: socket_parent_frame=ground_offset socket_child_frame=thorax_offset
      Coordinate r_z: default_value=0.1745329 range=(-6.283185 6.283185) clamped=true locked=true
      PhysicalOffsetFrame ground_offset: socket_parent=/ground translation=(0 0 0) [meters]
      PhysicalOffsetFrame thorax_offset: socket_parent=/bodyset/thorax translation=(0 0 0)
      SpatialTransform: axes_held_at_zero=(rotation1 rotation2 translation1 translation2 translation3)
        TransformAxis rotation3: coordinates=r_z axis=(0 0 1) LinearFunction(coefficients=1 0)
    CustomJoint sternoclavicular: socket_parent_frame=thorax_offset socket_child_frame=clavicle_offset
      Coordinate sternoclavicular_r2: default_value=-7.964705e-5 range=(-99999.9 99999.9) clamped=false
      Coordinate sternoclavicular_r3: default_value=3.373477e-5 range=(-99999.9 99999.9) clamped=false
      PhysicalOffsetFrame thorax_offset: socket_parent=/bodyset/thorax translation=(0.006325 0.00693 0.025465)
      PhysicalOffsetFrame clavicle_offset: socket_parent=/bodyset/clavicle translation=(0 0 0)
      SpatialTransform: axes_held_at_zero=(rotation3 translation1 translation2 translation3)
        TransformAxis rotation1: coordinates=sternoclavicular_r2 axis=(0.0153 0.9892987 -0.1451)
            LinearFunction(coefficients=1 0)
        TransformAxis rotation2: coordinates=sternoclavicular_r3 axis=(-0.9944725 0 -0.104997)
            LinearFunction(coefficients=1 0)
    CustomJoint unrotscap: socket_parent_frame=clavicle_offset socket_child_frame=clavphant_offset
      Coordinate unrotscap_r3: default_value=-3.373477e-5 range=(-99999.9 99999.9) clamped=false
      Coordinate unrotscap_r2: default_value=7.964705e-5 range=(-99999.9 99999.9) clamped=false
      PhysicalOffsetFrame clavicle_offset: socket_parent=/bodyset/clavicle translation=(-0.01433 0.02007 0.135535)
      PhysicalOffsetFrame clavphant_offset: socket_parent=/bodyset/clavphant translation=(0 0 0)
      SpatialTransform: axes_held_at_zero=(rotation3 translation1 translation2 translation3)
        TransformAxis rotation1: coordinates=unrotscap_r3 axis=(-0.9944725 0 -0.104997)
            LinearFunction(coefficients=1 0)
        TransformAxis rotation2: coordinates=unrotscap_r2 axis=(0.0153 0.9892987 -0.1451)
            LinearFunction(coefficients=1 0)
    CustomJoint acromioclavicular: socket_parent_frame=clavphant_offset socket_child_frame=scapula_offset
      Coordinate acromioclavicular_r2: default_value=-1.612684e-5 range=(-99999.9 99999.9) clamped=false
      Coordinate acromioclavicular_r3: default_value=0.0001303321 range=(-99999.9 99999.9) clamped=false
      Coordinate acromioclavicular_r1: default_value=5.858337e-5 range=(-99999.9 99999.9) clamped=false
      PhysicalOffsetFrame clavphant_offset: socket_parent=/bodyset/clavphant translation=(0 0 0)
      PhysicalOffsetFrame scapula_offset: socket_parent=/bodyset/scapula translation=(0 0 0)
      SpatialTransform: axes_held_at_zero=(translation1 translation2 translation3)
        TransformAxis rotation1: coordinates=acromioclavicular_r2 axis=(0.1570949 0.9472686 -0.2792909)
            LinearFunction(coefficients=1 0)
        TransformAxis rotation2: coordinates=acromioclavicular_r3 axis=(-0.754084 0.297594 0.585487)
            LinearFunction(coefficients=1 0)
        TransformAxis rotation3: coordinates=acromioclavicular_r1 axis=(0.6376998 0.1186 0.7610998)
            LinearFunction(coefficients=1 0)
    CustomJoint unrothum: socket_parent_frame=scapula_offset socket_child_frame=scapphant_offset
      Coordinate unrothum_r1: default_value=-5.858337e-5 range=(-99999.9 99999.9) clamped=false
      Coordinate unrothum_r3: default_value=-0.0001303321 range=(-99999.9 99999.9) clamped=false
      Coordinate unrothum_r2: default_value=1.612684e-5 range=(-99999.9 99999.9) clamped=false
      PhysicalOffsetFrame scapula_offset: socket_parent=/bodyset/scapula translation=(-0.00955 -0.034 0.009)
      PhysicalOffsetFrame scapphant_offset: socket_parent=/bodyset/scapphant translation=(0 0 0)
      SpatialTransform: axes_held_at_zero=(translation1 translation2 translation3)
        TransformAxis rotation1: coordinates=unrothum_r1 axis=(0.6376998 0.1186 0.7610998)
            LinearFunction(coefficients=1 0)
        TransformAxis rotation2: coordinates=unrothum_r3 axis=(-0.754084 0.297594 0.585487)
            LinearFunction(coefficients=1 0)
        TransformAxis rotation3: coordinates=unrothum_r2 axis=(0.1570949 0.9472686 -0.2792909)
            LinearFunction(coefficients=1 0)
    CustomJoint shoulder0: socket_parent_frame=scapphant_offset socket_child_frame=humphant_offset
      Coordinate elv_angle: default_value=1.22173 range=(-1.570796 2.268928) clamped=true prescribed=true
      PhysicalOffsetFrame scapphant_offset: socket_parent=/bodyset/scapphant translation=(0 0 0)
      PhysicalOffsetFrame humphant_offset: socket_parent=/bodyset/humphant translation=(0 0 0)
      SpatialTransform: axes_held_at_zero=(rotation2 rotation3 translation1 translation2 translation3)
        TransformAxis rotation1: coordinates=elv_angle axis=(0.0048 0.9990892 0.04240001)
            LinearFunction(coefficients=1 0)
    CustomJoint shoulder1: socket_parent_frame=humphant_offset socket_child_frame=humphant1_offset
      Coordinate shoulder_elv: default_value=0.1745329 range=(0 3.141593) clamped=true prescribed=true
      Coordinate shoulder1_r2: default_value=-1.373277 range=(-99999.9 99999.9) clamped=false
      PhysicalOffsetFrame humphant_offset: socket_parent=/bodyset/humphant translation=(0 0 0)
      PhysicalOffsetFrame humphant1_offset: socket_parent=/bodyset/humphant1 translation=(0 0 0)
      SpatialTransform: axes_held_at_zero=(rotation3 translation1 translation2 translation3)
        TransformAxis rotation1: coordinates=shoulder_elv axis=(-0.9982614 0.0023 0.05889802)
            LinearFunction(coefficients=1 0)
        TransformAxis rotation2: coordinates=shoulder1_r2 axis=(0.0048 0.9990892 0.04240001)
            LinearFunction(coefficients=1 0)
    CustomJoint shoulder2: socket_parent_frame=humphant1_offset socket_child_frame=humerus_offset
      Coordinate shoulder_rot: default_value=-0.09250245 range=(-1.570796 0.3490659) clamped=true prescribed=true
      PhysicalOffsetFrame humphant1_offset: socket_parent=/bodyset/humphant1 translation=(0 0 0)
      PhysicalOffsetFrame humerus_offset: socket_parent=/bodyset/humerus translation=(0 0 0)
      SpatialTransform: axes_held_at_zero=(rotation2 rotation3 translation1 translation2 translation3)
        TransformAxis rotation1: coordinates=shoulder_rot axis=(0.0048 0.9990892 0.04240001)
            LinearFunction(coefficients=1 0)
    CustomJoint elbow: socket_parent_frame=humerus_offset socket_child_frame=ulna_offset
      Coordinate elbow_flexion: default_value=0 range=(0 2.268928) clamped=true prescribed=true
      PhysicalOffsetFrame humerus_offset: socket_parent=/bodyset/humerus translation=(0.0061 -0.2904 -0.0123)
      PhysicalOffsetFrame ulna_offset: socket_parent=/bodyset/ulna translation=(0 0 0)
      SpatialTransform: axes_held_at_zero=(rotation2 rotation3 translation1 translation2 translation3)
        TransformAxis rotation1: coordinates=elbow_flexion axis=(0.04940001 0.03660001 0.9981083)
            LinearFunction(coefficients=1 0)
    CustomJoint radioulnar: socket_parent_frame=ulna_offset socket_child_frame=radius_offset
      Coordinate pro_sup: default_value=-1.570796 range=(-1.570796 1.570796) clamped=true locked=true prescribed=true
      PhysicalOffsetFrame ulna_offset: socket_parent=/bodyset/ulna translation=(0.0004 -0.011503 0.019999)
      PhysicalOffsetFrame radius_offset: socket_parent=/bodyset/radius translation=(0 0 0)
      SpatialTransform: axes_held_at_zero=(rotation2 rotation3 translation1 translation2 translation3)
        TransformAxis rotation1: coordinates=pro_sup axis=(-0.01716099 0.9926656 -0.119668)
            LinearFunction(coefficients=1 0)
    CustomJoint radiocarpal: socket_parent_frame=radius_offset socket_child_frame=proximal_row_offset
      Coordinate deviation: default_value=0 range=(-0.1745329 0.4363323) clamped=true locked=true prescribed=true
      Coordinate flexion: default_value=0 range=(-1.22173 1.22173) clamped=true locked=true prescribed=true
      PhysicalOffsetFrame radius_offset: socket_parent=/bodyset/radius translation=(0.018 -0.242 0.025)
      PhysicalOffsetFrame proximal_row_offset: socket_parent=/bodyset/proximal_row translation=(0 0 0)
      SpatialTransform: axes_held_at_zero=(rotation2 translation1 translation2 translation3)
        TransformAxis rotation1: coordinates=deviation axis=(-0.819064 -0.135611 -0.557444)
          SimmSpline: x=(-0.174533 0 0.436332) y=(-0.174533 0 0.436332)
        TransformAxis rotation3: coordinates=flexion axis=(0.9564267 -0.2522069 0.147104)
          SimmSpline: x=(-1.5708 1.5708) y=(-0.785398 0.785398)
    CustomJoint wrist_hand: socket_parent_frame=proximal_row_offset socket_child_frame=hand_offset
      Coordinate wrist_hand_r1: default_value=0 range=(-99999.9 99999.9) clamped=false
      Coordinate wrist_hand_r3: default_value=0 range=(-99999.9 99999.9) clamped=false
      PhysicalOffsetFrame proximal_row_offset: socket_parent=/bodyset/proximal_row
          translation=(0.003992 -0.015054 0.002327)
      PhysicalOffsetFrame hand_offset: socket_parent=/bodyset/hand translation=(0 0 0)
      SpatialTransform: axes_held_at_zero=(rotation3 translation1 translation2 translation3)
        TransformAxis rotation1: coordinates=wrist_hand_r1 axis=(0.8991357 -0.3490529 -0.2640399)
            LinearFunction(coefficients=1 0)
        TransformAxis rotation2: coordinates=wrist_hand_r3 axis=(0.9971185 0.01069999 -0.07510096)
            LinearFunction(coefficients=1 0)
  ConstraintSet:
    CoordinateCouplerConstraint [values shared by the 13 below unless stated]: independent_coordinate_names=shoulder_elv
        scale_factor=1
    CoordinateCouplerConstraint sternoclavicular_r2_con: dependent_coordinate_name=sternoclavicular_r2
      coupled_coordinates_function: SimmSpline: x=(0 2.61799) y=(0 -0.633555)
    CoordinateCouplerConstraint sternoclavicular_r3_con: dependent_coordinate_name=sternoclavicular_r3
      coupled_coordinates_function: SimmSpline: x=(0 3.14159) y=(0 0.322013)
    CoordinateCouplerConstraint unrotscap_r2_con: dependent_coordinate_name=unrotscap_r2
      coupled_coordinates_function: SimmSpline: x=(0 2.61799) y=(0 0.633555)
    CoordinateCouplerConstraint unrotscap_r3_con: dependent_coordinate_name=unrotscap_r3
      coupled_coordinates_function: SimmSpline: x=(0 3.14159) y=(0 -0.322013)
    CoordinateCouplerConstraint acromioclavicular_r1_con: dependent_coordinate_name=acromioclavicular_r1
      coupled_coordinates_function: SimmSpline: x=(0 2.61799) y=(0 0.466003)
    CoordinateCouplerConstraint acromioclavicular_r2_con: dependent_coordinate_name=acromioclavicular_r2
      coupled_coordinates_function: SimmSpline: x=(0 2.61799) y=(0 -0.128282)
    CoordinateCouplerConstraint acromioclavicular_r3_con: dependent_coordinate_name=acromioclavicular_r3
      coupled_coordinates_function: SimmSpline: x=(0 2.61799) y=(0 1.03673)
    CoordinateCouplerConstraint unrothum_r1_con: dependent_coordinate_name=unrothum_r1
      coupled_coordinates_function: SimmSpline: x=(0 2.61799) y=(0 -0.466003)
    CoordinateCouplerConstraint unrothum_r2_con: dependent_coordinate_name=unrothum_r2
      coupled_coordinates_function: SimmSpline: x=(0 2.61799) y=(0 0.128282)
    CoordinateCouplerConstraint unrothum_r3_con: dependent_coordinate_name=unrothum_r3
      coupled_coordinates_function: SimmSpline: x=(0 2.61799) y=(0 -1.03673)
    CoordinateCouplerConstraint shoulder1_r2_con: independent_coordinate_names=elv_angle
        dependent_coordinate_name=shoulder1_r2
      coupled_coordinates_function: SimmSpline: x=(-1.5708 3.14159) y=(1.5708 -3.14159)
    CoordinateCouplerConstraint wrist_hand_r1_con: independent_coordinate_names=deviation
        dependent_coordinate_name=wrist_hand_r1
      coupled_coordinates_function: SimmSpline f18: x=(-0.174533 0 0.436332) y=(-0.261799 0 0.436332)
    CoordinateCouplerConstraint wrist_hand_r3_con: independent_coordinate_names=flexion
        dependent_coordinate_name=wrist_hand_r3
      coupled_coordinates_function: SimmSpline f19: x=(-1.22173 1.22173) y=(-0.610865 0.610865)
  ForceSet:
    CoordinateLimitForce shoulder_elv_ligaments: coordinate=shoulder_elv upper_stiffness=100 [N*m/degree]
        upper_limit=150 [degrees] lower_stiffness=100 [N*m/degree] lower_limit=30 [degrees] damping=0
        transition=542.8423 [degrees]
    CoordinateLimitForce shoulder_elv_damping: coordinate=shoulder_elv upper_stiffness=1e-8 upper_limit=190
        lower_stiffness=1e-8 lower_limit=190 damping=0.001745 transition=1
    CoordinateLimitForce elv_angle_ligaments: coordinate=elv_angle upper_stiffness=100 upper_limit=100
        lower_stiffness=100 lower_limit=-60 damping=0 transition=545.4471
    CoordinateLimitForce elv_angle_damping: coordinate=elv_angle upper_stiffness=1e-8 upper_limit=190
        lower_stiffness=1e-8 lower_limit=190 damping=0.001745 transition=1
    CoordinateLimitForce shoulder_rot_ligaments: coordinate=shoulder_rot upper_stiffness=100 upper_limit=-10
        lower_stiffness=100 lower_limit=-60 damping=0 transition=485.466
    CoordinateLimitForce shoulder_rot_damping: coordinate=shoulder_rot upper_stiffness=1e-8 upper_limit=190
        lower_stiffness=1e-8 lower_limit=190 damping=0.001745 transition=1
    CoordinateLimitForce elbow_flexion_ligaments: coordinate=elbow_flexion upper_stiffness=0.3037 upper_limit=85
        lower_stiffness=100 lower_limit=14 damping=0 transition=139.5813
    CoordinateLimitForce elbow_flexion_damping: coordinate=elbow_flexion upper_stiffness=1e-8 upper_limit=190
        lower_stiffness=1e-8 lower_limit=190 damping=0.001745 transition=1
    CoordinateLimitForce pro_sup_ligaments: coordinate=pro_sup upper_stiffness=50 upper_limit=60 lower_stiffness=50
        lower_limit=-60 damping=0 transition=430.1186
    CoordinateLimitForce pro_sup_damping: coordinate=pro_sup upper_stiffness=1e-8 upper_limit=190 lower_stiffness=1e-8
        lower_limit=190 damping=0.001745 transition=1
    CoordinateLimitForce deviation_ligaments: coordinate=deviation upper_stiffness=52.5961 upper_limit=20
        lower_stiffness=487.176 lower_limit=-6 damping=0 transition=39.1586
    CoordinateLimitForce deviation_damping: coordinate=deviation upper_stiffness=1e-8 upper_limit=190
        lower_stiffness=1e-8 lower_limit=190 damping=0.001745 transition=1
    CoordinateLimitForce flexion_ligaments: coordinate=flexion upper_stiffness=200 upper_limit=60
        lower_stiffness=135.3232 lower_limit=-60 damping=0 transition=92.916
    CoordinateLimitForce flexion_damping: coordinate=flexion upper_stiffness=1e-8 upper_limit=190 lower_stiffness=1e-8
        lower_limit=190 damping=0.00043633 transition=1
    SpasticMillardMuscleModel TRIlat:
      max_isometric_force: 717.5
      optimal_fiber_length: 0.1138
      tendon_slack_length: 0.098
      pennation_angle_at_optimal: 0.1570796 [radians]
      max_contraction_velocity: 0
      time_scale: 0.1
      activation1: 7.667
      activation2: 1.459854
      damping: 0.017
      PathPoint P1: humerus (-0.00599 -0.12646 0.00428)
      PathPoint P2: humerus (-0.02344 -0.14528 0.00928)
      PathPoint P3: humerus (-0.03184 -0.22637 -0.01217)
      PathPoint P4: humerus (-0.01743 -0.26757 -0.01208)
      PathPoint P5: ulna (-0.0219 0.01046 -0.00078)
      PathWrap: wrap_object=TRI method=hybrid
      tendon_force_length_curve: SimmSpline: x=(-10 -0.002 -0.001 0 0.00131 0.00281 0.00431 0.00581 0.00731 0.00881 0.0103 0.0118 0.0123 9.2 9.201 9.202 20)
          y=(0 0 0 0 0.0108 0.0257 0.0435 0.0652 0.0915 0.123 0.161 0.208 0.227 345 345 345 345)
      active_force_length_curve: SimmSpline: x=(-35 0 0.401 0.402 0.4035 0.52725 0.62875 0.71875 0.86125 1.045 1.2175 1.43875 1.61875 1.62 1.621 2.2 35)
          y=(0 0 0 0 0 0.226667 0.636667 0.856667 0.95 0.993333 0.77 0.246667 0 0 0 0 0)
      passive_force_length_curve: SimmSpline: x=(-35 1 1.05 1.1 1.125 1.14 1.145 1.15 1.15 1.25 1.35 1.45 1.55 1.65 1.75 1.7501 1.7502 35)
          y=(0 0 0 0 0 0 0 0 0 0.035 0.12 0.26 0.55 1.17 2 2 2 2)
    SpasticMillardMuscleModel BIClong:
      max_isometric_force: 525.1
      optimal_fiber_length: 0.1157
      tendon_slack_length: 0.2723
      pennation_angle_at_optimal: 0
      max_contraction_velocity: 10
      minimum_activation: 0.01
      gain_factor: 2
      threshold_value: 0.1
      PathPoint P1: scapula (-0.03123 -0.02353 -0.01305)
      PathPoint P2: scapula (-0.02094 -0.01309 -0.00461)
      PathPoint P3: humerus (0.02131 0.01793 0.01028)
      PathPoint P4: humerus (0.02378 -0.00511 0.01201)
      PathPoint P5: humerus (0.01345 -0.02827 0.00136)
      PathPoint P6: humerus (0.01068 -0.07736 -0.00165)
      PathPoint P7: humerus (0.01703 -0.12125 0.00024)
      PathPoint P8: humerus (0.0228 -0.1754 -0.0063)
      MovingPathPoint default: radius socket_x_coordinate=/jointset/radioulnar/pro_sup
          socket_y_coordinate=/jointset/radioulnar/pro_sup socket_z_coordinate=/jointset/radioulnar/pro_sup
        x_location: MultiplierFunction: scale=1
          SimmSpline: x=(-1.57561 1.57823) y=(-0.0055 0.01096)
        y_location: MultiplierFunction: scale=1
          PiecewiseLinearFunction: x=(-1.57561 0 1.57561) y=(-0.0282 -0.035 -0.0392)
        z_location: MultiplierFunction: scale=1
          SimmSpline: x=(-1.57561 0.0866167 1.57561) y=(-0.01 -0.01358 -0.01083)
      PathPoint P11: radius (-0.002 -0.0375 -0.002)
      PathWrap: wrap_object=Elbow_BIC_BRD method=hybrid
      PathWrap pathwrap_0: wrap_object=BIClong method=hybrid range=(2 5)
      ActiveForceLengthCurve: minimum_value=0
      ForceVelocityCurve: concentric_slope_at_vmax=0 concentric_slope_near_vmax=0.25 isometric_slope=5
          eccentric_slope_at_vmax=0 eccentric_slope_near_vmax=0.15 max_eccentric_velocity_force_multiplier=1.4
      FiberForceLengthCurve
      TendonForceLengthCurve
    SpasticMillardMuscleModel BICshort:
      max_isometric_force: 316.8
      optimal_fiber_length: 0.1321
      tendon_slack_length: 0.1923
      pennation_angle_at_optimal: 0
      max_contraction_velocity: 10
      minimum_activation: 0.01
      gain_factor: 2
      threshold_value: 0.1
      PathPoint P1: scapula (0.01268 -0.03931 -0.02625)
      PathPoint P2: scapula (0.00093 -0.06704 -0.01593)
      PathPoint P3: humerus (0.01117 -0.07576 -0.01101)
      PathPoint P4: humerus (0.01703 -0.12125 -0.01079)
      PathPoint P5: humerus (0.0228 -0.1754 -0.0063)
      MovingPathPoint default: radius socket_x_coordinate=/jointset/radioulnar/pro_sup
          socket_y_coordinate=/jointset/radioulnar/pro_sup socket_z_coordinate=/jointset/radioulnar/pro_sup
        x_location: MultiplierFunction: scale=1
          SimmSpline: x=(-1.57561 1.57823) y=(-0.0055 0.01096)
        y_location: MultiplierFunction: scale=1
          PiecewiseLinearFunction: x=(-1.57561 0 1.57561) y=(-0.0282 -0.035 -0.0392)
        z_location: MultiplierFunction: scale=1
          SimmSpline: x=(-1.57561 0.0866167 1.57561) y=(-0.01 -0.01358 -0.01083)
      PathPoint P8: radius (-0.002 -0.0375 -0.002)
      PathWrap: wrap_object=Elbow_BIC_BRD method=hybrid
      ActiveForceLengthCurve: minimum_value=0
      ForceVelocityCurve: concentric_slope_at_vmax=0 concentric_slope_near_vmax=0.25 isometric_slope=5
          eccentric_slope_at_vmax=0 eccentric_slope_near_vmax=0.15 max_eccentric_velocity_force_multiplier=1.4
      FiberForceLengthCurve
      TendonForceLengthCurve
    SpasticMillardMuscleModel BRD:
      max_isometric_force: 276
      optimal_fiber_length: 0.1726
      tendon_slack_length: 0.133
      pennation_angle_at_optimal: 0
      max_contraction_velocity: 0
      time_scale: 0.1
      activation1: 7.667
      activation2: 1.459854
      damping: 0.017
      PathPoint P1: humerus (-0.0098 -0.19963 0.00223)
      PathPoint P2: radius (0.03577 -0.12742 0.02315)
      PathPoint P3: radius (0.0419 -0.221 0.0224)
      PathWrap: wrap_object=Elbow_BIC_BRD method=hybrid
      tendon_force_length_curve: SimmSpline: x=(-10 -0.002 -0.001 0 0.00131 0.00281 0.00431 0.00581 0.00731 0.00881 0.0103 0.0118 0.0123 9.2 9.201 9.202 20)
          y=(0 0 0 0 0.0108 0.0257 0.0435 0.0652 0.0915 0.123 0.161 0.208 0.227 345 345 345 345)
      active_force_length_curve: SimmSpline: x=(-35 0 0.401 0.402 0.4035 0.52725 0.62875 0.71875 0.86125 1.045 1.2175 1.43875 1.61875 1.62 1.621 2.2 35)
          y=(0 0 0 0 0 0.226667 0.636667 0.856667 0.95 0.993333 0.77 0.246667 0 0 0 0 0)
      passive_force_length_curve: SimmSpline: x=(-35 1 1.05 1.1 1.125 1.14 1.145 1.15 1.15 1.25 1.35 1.45 1.55 1.65 1.75 1.7501 1.7502 35)
          y=(0 0 0 0 0 0 0 0 0 0.035 0.12 0.26 0.55 1.17 2 2 2 2)
    Millard2012EquilibriumMuscle FCR: max_isometric_force=407.9 optimal_fiber_length=0.0628 tendon_slack_length=0.244
        pennation_angle_at_optimal=0.0523599 max_contraction_velocity=0 time_scale=0.1 activation1=7.667
        activation2=1.459854 damping=0.017
      PathPoint P1: humerus (0.00758 -0.27806 -0.03705)
      PathPoint P2: radius (0.0211 -0.21943 0.00127)
      PathPoint P3: hand (0.01124 -0.01844 -0.00418)
      PathWrap: wrap_object=Elbow_PT_ECRL method=hybrid
      PathWrap pathwrap_0: wrap_object=FCR method=hybrid
      tendon_force_length_curve: SimmSpline: x=(-10 -0.002 -0.001 0 0.00131 0.00281 0.00431 0.00581 0.00731 0.00881 0.0103 0.0118 0.0123 9.2 9.201 9.202 20)
          y=(0 0 0 0 0.0108 0.0257 0.0435 0.0652 0.0915 0.123 0.161 0.208 0.227 345 345 345 345)
      active_force_length_curve: SimmSpline: x=(-35 0 0.401 0.402 0.4035 0.52725 0.62875 0.71875 0.86125 1.045 1.2175 1.43875 1.61875 1.62 1.621 2.2 35)
          y=(0 0 0 0 0 0.226667 0.636667 0.856667 0.95 0.993333 0.77 0.246667 0 0 0 0 0)
      passive_force_length_curve: SimmSpline: x=(-35 1 1.05 1.1 1.125 1.14 1.145 1.15 1.15 1.25 1.35 1.45 1.55 1.65 1.75 1.7501 1.7502 35)
          y=(0 0 0 0 0 0 0 0 0 0.035 0.12 0.26 0.55 1.17 2 2 2 2)
    SpasticMillardMuscleModel BRA:
      max_isometric_force: 1177.37
      optimal_fiber_length: 0.0858
      tendon_slack_length: 0.0535
      pennation_angle_at_optimal: 0
      max_contraction_velocity: 10
      minimum_activation: 0.01
      gain_factor: 2
      threshold_value: 0.1
      PathPoint P1: humerus (0.0068 -0.1739 -0.0036)
      ConditionalPathPoint P2: humerus (0.01894 -0.28559 -0.01105) socket_coordinate=/jointset/elbow/elbow_flexion
          range=(0 0.813149) [radians]
      ConditionalPathPoint P3: ulna (0.00498 -0.01463 0.00128) socket_coordinate=/jointset/elbow/elbow_flexion
          range=(0 0.813149)
      PathPoint P4: ulna (-0.0032 -0.0239 0.0009)
      ActiveForceLengthCurve: minimum_value=0
      ForceVelocityCurve: concentric_slope_at_vmax=0 concentric_slope_near_vmax=0.25 isometric_slope=5
          eccentric_slope_at_vmax=0 eccentric_slope_near_vmax=0.15 max_eccentric_velocity_force_multiplier=1.4
      FiberForceLengthCurve
      TendonForceLengthCurve
  MarkerSet:
    Marker Handle: hand (0 -0.03 0)
    Marker SpineBase: thorax (0 -0.3 0)
    Marker SpineMid: thorax (0 -0.15 0)
    Marker Neck: thorax (0 0.03 0)
    Marker Head: thorax (0 0.1 0)
    Marker ShoulderRight: clavphant (0 -0.03 0)
    Marker ElbowRight: radius (0 0 0)
    Marker WristRight: proximal_row (0 0 0)
    Marker HandRight: hand (0 -0.03 0)
    Marker HipLeft: thorax (0 -0.3 -0.05)
    Marker HipRight: thorax (0 -0.3 0.05)
    Marker SpineShoulder: clavicle (-0.01074773 -0.01980481 -0.0260538)
    Marker ThumbRight: hand (0.04010478 -0.07052346 -0.03686815)
    Marker HandTipRight: hand (0.008702064 -0.1321327 -0.01178787)
