# OpenSim document version 40000
CMC_TaskSet CMC_TaskSet_FlexionCodo:
  defaults: CMC_Joint default: on=false weight=(1 1 1) wrt_body=-1 express_body=-1 active=(false false false)
      kp=(1 1 1) kv=(1 1 1) ka=(1 1 1) r0=(0 0 0) r1=(0 0 0) r2=(0 0 0) limit=0
  CMC_Joint [values shared by the 7 below unless stated]: weight=(1 1 1) wrt_body=-1 express_body=-1
      active=(true false false) kp=(100 1 1) kv=(20 1 1) ka=(1 1 1) r0=(0 0 0) r1=(0 0 0) r2=(0 0 0) limit=0
  CMC_Joint elv_angle: on=false coordinate=elv_angle
  CMC_Joint shoulder_elv: on=false coordinate=shoulder_elv
  CMC_Joint shoulder_rot: on=false coordinate=shoulder_rot
  CMC_Joint elbow_flexion: coordinate=elbow_flexion
  CMC_Joint pro_sup: on=false coordinate=pro_sup
  CMC_Joint deviation: on=false coordinate=deviation
  CMC_Joint flexion: on=false coordinate=flexion
